# Motorok
I_fazis := 1.68 A
V_fazis := 3.4 V
α_motor := 1.8 deg
5 m*sin(0.1 deg) = 0.872664 cm
# Fogaskerekek
i := 10
α_torony := α_motor/i = 0.18 deg
# Tévedés 5 méteren: | Tévedés 10 méteren:
5 m*sin(α_torony/2) = 0.785398 cm
10 m*sin(α_torony/2) = 1.5708 cm
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